*Heading
** Job name: RVE_VF_20_DIR_1_LAYERED Model name: RVE_VF_20_DIR_1_LAYERED
** Generated by: Abaqus/CAE 2020
*Preprint, echo=NO, model=NO, history=NO, contact=NO
**
** PARTS
**
*Part, name=RVE2DComposite
*Node
      1,  0.075000003, -0.0250000004
      2, 0.0352878943, -0.0136752538
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*Element, type=CPS4T
  1,  39,  40, 180, 170
  2,  40,  41, 181, 180
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*Nset, nset=_PickedSet3, internal, generate
   1,  355,    1
*Elset, elset=_PickedSet3, internal, generate
   1,  277,    1
*Nset, nset=_PickedSet4, internal
   6,   7,  12,  13,  97,  98
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*Elset, elset=_PickedSet4, internal, generate
 278,  297,    1
*Nset, nset=_PickedSet5, internal
   2,   3,   4,   8, 117, 118
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*Elset, elset=_PickedSet5, internal, generate
 298,  323,    1
*Nset, nset=_PickedSet6, internal
   9,  10,  14,  15, 143, 144
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*Elset, elset=_PickedSet6, internal, generate
 324,  341,    1
** Section: matrixSection
*Solid Section, elset=_PickedSet3, material=PEEK
,
** Section: fibreSection
*Solid Section, elset=_PickedSet4, material=CARBON
,
** Section: fibreSection
*Solid Section, elset=_PickedSet5, material=CARBON
,
** Section: fibreSection
*Solid Section, elset=_PickedSet6, material=CARBON
,
*End Part
**
**
** ASSEMBLY
**
*Assembly, name=Assembly
**
*Instance, name=RVE2DComposite, part=RVE2DComposite
*End Instance
**
*End Assembly
**
** MATERIALS
**
*Material, name=CARBON
*Conductivity
 0.105,
*Density
 1.3e-09,
*Elastic
230000., 0.3
*Expansion
 -4.1e-07,
*Specific Heat
 7.77e+08,
*Material, name=PEEK
*Conductivity
 0.27,
*Density
 1.29e-09,
*Elastic
3720., 0.4
*Expansion
 4.7e-05,
*Specific Heat
 1.1e+09,
