*Heading
** Job name: RVE_CF_PEEK_0_2 Model name: Aligned_ShortFibreComposite
** Generated by: Abaqus/CAE 2020
*Preprint, echo=NO, model=NO, history=NO, contact=NO
**
** PARTS
**
*Part, name=RVE2DComposite
*Node
      1, 0.0718096346, 0.0835661739
      2, -0.0641282052, 0.0835661739
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*Element, type=CPS4R
  1,   1,  68,  69, 132
  2, 132,  69,  70, 131
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*Nset, nset=_PickedSet3, internal, generate
   1,  441,    1
*Elset, elset=_PickedSet3, internal, generate
   1,  321,    1
*Nset, nset=_PickedSet4, internal
   1,   2,   5,   7, 105, 106
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*Elset, elset=_PickedSet4, internal, generate
 322,  336,    1
*Nset, nset=_PickedSet5, internal
  18,  19,  21,  23, 133, 134
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*Elset, elset=_PickedSet5, internal, generate
 337,  349,    1
*Nset, nset=_PickedSet6, internal
  11,  14,  15,  16, 157, 158
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*Elset, elset=_PickedSet6, internal, generate
 350,  363,    1
*Nset, nset=_PickedSet7, internal
  12,  13,  17,  20, 183, 184
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*Elset, elset=_PickedSet7, internal, generate
 364,  377,    1
*Nset, nset=_PickedSet8, internal
   3,   6,   9,  10, 209, 210
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*Elset, elset=_PickedSet8, internal, generate
 378,  392,    1
*Nset, nset=_PickedSet9, internal
  25,  26,  27,  28, 237, 238
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*Elset, elset=_PickedSet9, internal, generate
 393,  400,    1
** Section: matrixSection
*Solid Section, elset=_PickedSet3, material=PEEK
,
** Section: fibreSection
*Solid Section, elset=_PickedSet4, material=CARBON
,
** Section: fibreSection
*Solid Section, elset=_PickedSet5, material=CARBON
,
** Section: fibreSection
*Solid Section, elset=_PickedSet6, material=CARBON
,
** Section: fibreSection
*Solid Section, elset=_PickedSet7, material=CARBON
,
** Section: fibreSection
*Solid Section, elset=_PickedSet8, material=CARBON
,
** Section: fibreSection
*Solid Section, elset=_PickedSet9, material=CARBON
,
*End Part
**
**
** ASSEMBLY
**
*Assembly, name=Assembly
**
*Instance, name=RVE2DComposite, part=RVE2DComposite
*End Instance
**
*End Assembly
**
** MATERIALS
**
*Material, name=CARBON
*Elastic
240000, 0.3
*Material, name=PEEK
*Elastic
3720, 0.4
