*Heading
** Job name: RVE_CF_PEEK_23_020 Model name: Model-1
** Generated by: Abaqus/CAE 2020
*Preprint, echo=NO, model=NO, history=NO, contact=NO
**
** PARTS
**
*Part, name=Part-1
*End Part
**
**
** ASSEMBLY
**
*Assembly, name=Assembly
**
*Instance, name=Part-1-1, part=Part-1
*Node
      1, 0.0389680117, -0.0449207276
      2,  0.053556364, -0.0241747145
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*Element, type=CPS4T
   1, 2031, 1693, 2032, 3290
   2, 2032, 2033, 3291, 3290
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*Nset, nset=_PickedSet103, internal, generate
    1,  4506,     1
*Elset, elset=_PickedSet103, internal, generate
    1,  3760,     1
*Nset, nset=_PickedSet104, internal
   38,  936,  937,  938,  939,  940
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*Elset, elset=_PickedSet104, internal, generate
 6909,  6936,     1
*Nset, nset=_PickedSet105, internal
    4,  803,  804,  805,  806,  807
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*Elset, elset=_PickedSet105, internal, generate
 6885,  6908,     1
*Nset, nset=_PickedSet106, internal
   11,  951,  952,  953,  954,  955
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*Elset, elset=_PickedSet106, internal, generate
 6850,  6884,     1
*Nset, nset=_PickedSet107, internal
   85,  788,  789,  790,  791,  792
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*Elset, elset=_PickedSet107, internal, generate
 6818,  6849,     1
*Nset, nset=_PickedSet108, internal
   88,  966,  967,  968,  969,  970
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*Elset, elset=_PickedSet108, internal, generate
 6783,  6817,     1
*Nset, nset=_PickedSet109, internal
   18,  773,  774,  775,  776,  777
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*Elset, elset=_PickedSet109, internal, generate
 6755,  6782,     1
*Nset, nset=_PickedSet110, internal
   95,  979,  980,  981,  982,  983
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*Elset, elset=_PickedSet110, internal, generate
 6698,  6754,     1
*Nset, nset=_PickedSet111, internal
   91,  762,  763,  764,  765,  766
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*Elset, elset=_PickedSet111, internal, generate
 6675,  6697,     1
*Nset, nset=_PickedSet112, internal
    7,  998,  999, 1000, 1001, 1002
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*Elset, elset=_PickedSet112, internal, generate
 6639,  6674,     1
*Nset, nset=_PickedSet113, internal
   90,  747,  748,  749,  750,  751
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*Elset, elset=_PickedSet113, internal, generate
 6607,  6638,     1
*Nset, nset=_PickedSet114, internal
   48, 1015, 1016, 1017, 1018, 1019
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*Elset, elset=_PickedSet114, internal, generate
 6566,  6606,     1
*Nset, nset=_PickedSet115, internal
   16,  734,  735,  736,  737,  738
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*Elset, elset=_PickedSet115, internal, generate
 6538,  6565,     1
*Nset, nset=_PickedSet116, internal
   25, 1032, 1033, 1034, 1035, 1036
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*Elset, elset=_PickedSet116, internal, generate
 6509,  6537,     1
*Nset, nset=_PickedSet117, internal
   94,  719,  720,  721,  722,  723
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*Elset, elset=_PickedSet117, internal, generate
 6478,  6508,     1
*Nset, nset=_PickedSet118, internal
   67, 1045, 1046, 1047, 1048, 1049
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*Elset, elset=_PickedSet118, internal, generate
 6449,  6477,     1
*Nset, nset=_PickedSet119, internal
   34,  700,  701,  702,  703,  704
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*Elset, elset=_PickedSet119, internal, generate
 6396,  6448,     1
*Nset, nset=_PickedSet120, internal
   44, 1058, 1059, 1060, 1061, 1062
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*Elset, elset=_PickedSet120, internal, generate
 6370,  6395,     1
*Nset, nset=_PickedSet121, internal
   55,  685,  686,  687,  688,  689
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*Elset, elset=_PickedSet121, internal, generate
 6339,  6369,     1
*Nset, nset=_PickedSet122, internal
   58, 1071, 1072, 1073, 1074, 1075
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*Elset, elset=_PickedSet122, internal, generate
 6311,  6338,     1
*Nset, nset=_PickedSet123, internal
   59,  668,  669,  670,  671,  672
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*Elset, elset=_PickedSet123, internal, generate
 6279,  6310,     1
*Nset, nset=_PickedSet124, internal
   77, 1086, 1087, 1088, 1089, 1090
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*Elset, elset=_PickedSet124, internal, generate
 6255,  6278,     1
*Nset, nset=_PickedSet125, internal
    1,  657,  658,  659,  660,  661
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*Elset, elset=_PickedSet125, internal, generate
 6232,  6254,     1
*Nset, nset=_PickedSet126, internal
   64, 1099, 1100, 1101, 1102, 1103
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*Elset, elset=_PickedSet126, internal, generate
 6194,  6231,     1
*Nset, nset=_PickedSet127, internal
   42,  642,  643,  644,  645,  646
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*Elset, elset=_PickedSet127, internal, generate
 6162,  6193,     1
*Nset, nset=_PickedSet128, internal
   37, 1116, 1117, 1118, 1119, 1120
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*Elset, elset=_PickedSet128, internal, generate
 6134,  6161,     1
*Nset, nset=_PickedSet129, internal
   14,  625,  626,  627,  628,  629
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*Elset, elset=_PickedSet129, internal, generate
 6090,  6133,     1
*Nset, nset=_PickedSet130, internal
   66, 1131, 1132, 1133, 1134, 1135
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*Elset, elset=_PickedSet130, internal, generate
 6067,  6089,     1
*Nset, nset=_PickedSet131, internal
   78,  608,  609,  610,  611,  612
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*Elset, elset=_PickedSet131, internal, generate
 6031,  6066,     1
*Nset, nset=_PickedSet132, internal
   89, 1142, 1143, 1144, 1145, 1146
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*Elset, elset=_PickedSet132, internal, generate
 6002,  6030,     1
*Nset, nset=_PickedSet133, internal
  103,  595,  596,  597,  598,  599
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*Elset, elset=_PickedSet133, internal, generate
 5976,  6001,     1
*Nset, nset=_PickedSet134, internal
    2, 1153, 1154, 1155, 1156, 1157
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*Elset, elset=_PickedSet134, internal, generate
 5943,  5975,     1
*Nset, nset=_PickedSet135, internal
    8,  582,  583,  584,  585,  586
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*Elset, elset=_PickedSet135, internal, generate
 5914,  5942,     1
*Nset, nset=_PickedSet136, internal
  101, 1168, 1169, 1170, 1171, 1172
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*Elset, elset=_PickedSet136, internal, generate
 5882,  5913,     1
*Nset, nset=_PickedSet137, internal
   79,  571,  572,  573,  574,  575
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*Elset, elset=_PickedSet137, internal, generate
 5862,  5881,     1
*Nset, nset=_PickedSet138, internal
   84, 1185, 1186, 1187, 1188, 1189
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*Elset, elset=_PickedSet138, internal, generate
 5830,  5861,     1
*Nset, nset=_PickedSet139, internal
   98,  558,  559,  560,  561,  562
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*Elset, elset=_PickedSet139, internal, generate
 5802,  5829,     1
*Nset, nset=_PickedSet140, internal
   31, 1202, 1203, 1204, 1205, 1206
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*Elset, elset=_PickedSet140, internal, generate
 5761,  5801,     1
*Nset, nset=_PickedSet141, internal
   60,  545,  546,  547,  548,  549
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*Elset, elset=_PickedSet141, internal, generate
 5735,  5760,     1
*Nset, nset=_PickedSet142, internal
   71, 1217, 1218, 1219, 1220, 1221
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*Elset, elset=_PickedSet142, internal, generate
 5707,  5734,     1
*Nset, nset=_PickedSet143, internal
   23,  530,  531,  532,  533,  534
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*Elset, elset=_PickedSet143, internal, generate
 5666,  5706,     1
*Nset, nset=_PickedSet144, internal
   22, 1230, 1231, 1232, 1233, 1234
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*Elset, elset=_PickedSet144, internal, generate
 5642,  5665,     1
*Nset, nset=_PickedSet145, internal
   57,  515,  516,  517,  518,  519
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*Elset, elset=_PickedSet145, internal, generate
 5614,  5641,     1
*Nset, nset=_PickedSet146, internal
   86, 1243, 1244, 1245, 1246, 1247
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*Elset, elset=_PickedSet146, internal, generate
 5581,  5613,     1
*Nset, nset=_PickedSet147, internal
   96,  500,  501,  502,  503,  504
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*Elset, elset=_PickedSet147, internal, generate
 5550,  5580,     1
*Nset, nset=_PickedSet148, internal
   97, 1258, 1259, 1260, 1261, 1262
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*Elset, elset=_PickedSet148, internal, generate
 5518,  5549,     1
*Nset, nset=_PickedSet149, internal
   39,  487,  488,  489,  490,  491
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*Elset, elset=_PickedSet149, internal, generate
 5494,  5517,     1
*Nset, nset=_PickedSet150, internal
   68, 1275, 1276, 1277, 1278, 1279
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*Elset, elset=_PickedSet150, internal, generate
 5468,  5493,     1
*Nset, nset=_PickedSet151, internal
   49,  470,  471,  472,  473,  474
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*Elset, elset=_PickedSet151, internal, generate
 5417,  5467,     1
*Nset, nset=_PickedSet152, internal
   28, 1288, 1289, 1290, 1291, 1292
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*Elset, elset=_PickedSet152, internal, generate
 5393,  5416,     1
*Nset, nset=_PickedSet153, internal
   35,  457,  458,  459,  460,  461
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*Elset, elset=_PickedSet153, internal, generate
 5359,  5392,     1
*Nset, nset=_PickedSet154, internal
   43, 1301, 1302, 1303, 1304, 1305
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*Elset, elset=_PickedSet154, internal, generate
 5321,  5358,     1
*Nset, nset=_PickedSet155, internal
   92,  442,  443,  444,  445,  446
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*Elset, elset=_PickedSet155, internal, generate
 5293,  5320,     1
*Nset, nset=_PickedSet156, internal
   36, 1318, 1319, 1320, 1321, 1322
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*Elset, elset=_PickedSet156, internal, generate
 5269,  5292,     1
*Nset, nset=_PickedSet157, internal
   80,  431,  432,  433,  434,  435
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*Elset, elset=_PickedSet157, internal, generate
 5249,  5268,     1
*Nset, nset=_PickedSet158, internal
   54, 1331, 1332, 1333, 1334, 1335
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*Elset, elset=_PickedSet158, internal, generate
 5208,  5248,     1
*Nset, nset=_PickedSet159, internal
   76,  416,  417,  418,  419,  420
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*Elset, elset=_PickedSet159, internal, generate
 5180,  5207,     1
*Nset, nset=_PickedSet160, internal
   51, 1348, 1349, 1350, 1351, 1352
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*Elset, elset=_PickedSet160, internal, generate
 5145,  5179,     1
*Nset, nset=_PickedSet161, internal
   61,  401,  402,  403,  404,  405
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*Elset, elset=_PickedSet161, internal, generate
 5112,  5144,     1
*Nset, nset=_PickedSet162, internal
   72, 1363, 1364, 1365, 1366, 1367
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*Elset, elset=_PickedSet162, internal, generate
 5080,  5111,     1
*Nset, nset=_PickedSet163, internal
   50,  386,  387,  388,  389,  390
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*Elset, elset=_PickedSet163, internal, generate
 5042,  5079,     1
*Nset, nset=_PickedSet164, internal
   40, 1380, 1381, 1382, 1383, 1384
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*Elset, elset=_PickedSet164, internal, generate
 5011,  5041,     1
*Nset, nset=_PickedSet165, internal
   41,  371,  372,  373,  374,  375
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*Elset, elset=_PickedSet165, internal, generate
 4980,  5010,     1
*Nset, nset=_PickedSet166, internal
   20, 1395, 1396, 1397, 1398, 1399
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*Elset, elset=_PickedSet166, internal, generate
 4964,  4979,     1
*Nset, nset=_PickedSet167, internal
    6,  354,  355,  356,  357,  358
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*Elset, elset=_PickedSet167, internal, generate
 4928,  4963,     1
*Nset, nset=_PickedSet168, internal
   45, 1404, 1405, 1406, 1407, 1408
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*Elset, elset=_PickedSet168, internal, generate
 4890,  4927,     1
*Nset, nset=_PickedSet169, internal
    5,  341,  342,  343,  344,  345
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*Elset, elset=_PickedSet169, internal, generate
 4862,  4889,     1
*Nset, nset=_PickedSet170, internal
   17, 1421, 1422, 1423, 1424, 1425
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*Elset, elset=_PickedSet170, internal, generate
 4836,  4861,     1
*Nset, nset=_PickedSet171, internal
   70,  326,  327,  328,  329,  330
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*Elset, elset=_PickedSet171, internal, generate
 4797,  4835,     1
*Nset, nset=_PickedSet172, internal
   74, 1434, 1435, 1436, 1437, 1438
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*Elset, elset=_PickedSet172, internal, generate
 4753,  4796,     1
*Nset, nset=_PickedSet173, internal
   83,  311,  312,  313,  314,  315
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*Elset, elset=_PickedSet173, internal, generate
 4718,  4752,     1
*Nset, nset=_PickedSet174, internal
  102, 1453, 1454, 1455, 1456, 1457
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*Elset, elset=_PickedSet174, internal, generate
 4676,  4717,     1
*Nset, nset=_PickedSet175, internal
   82,  300,  301,  302,  303,  304
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*Elset, elset=_PickedSet175, internal, generate
 4653,  4675,     1
*Nset, nset=_PickedSet176, internal
   30, 1470, 1471, 1472, 1473, 1474
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*Elset, elset=_PickedSet176, internal, generate
 4625,  4652,     1
*Nset, nset=_PickedSet177, internal
   24,  283,  284,  285,  286,  287
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*Elset, elset=_PickedSet177, internal, generate
 4584,  4624,     1
*Nset, nset=_PickedSet178, internal
   75, 1485, 1486, 1487, 1488, 1489
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*Elset, elset=_PickedSet178, internal, generate
 4543,  4583,     1
*Nset, nset=_PickedSet179, internal
   47,  268,  269,  270,  271,  272
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*Elset, elset=_PickedSet179, internal, generate
 4515,  4542,     1
*Nset, nset=_PickedSet180, internal
   26, 1502, 1503, 1504, 1505, 1506
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*Elset, elset=_PickedSet180, internal, generate
 4474,  4514,     1
*Nset, nset=_PickedSet181, internal
   93,  257,  258,  259,  260,  261
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*Elset, elset=_PickedSet181, internal, generate
 4454,  4473,     1
*Nset, nset=_PickedSet182, internal
   73, 1517, 1518, 1519, 1520, 1521
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*Elset, elset=_PickedSet182, internal, generate
 4425,  4453,     1
*Nset, nset=_PickedSet183, internal
   21,  244,  245,  246,  247,  248
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*Elset, elset=_PickedSet183, internal, generate
 4401,  4424,     1
*Nset, nset=_PickedSet184, internal
    9, 1530, 1531, 1532, 1533, 1534
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*Elset, elset=_PickedSet184, internal, generate
 4377,  4400,     1
*Nset, nset=_PickedSet185, internal
   69,  229,  230,  231,  232,  233
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*Elset, elset=_PickedSet185, internal, generate
 4345,  4376,     1
*Nset, nset=_PickedSet186, internal
   65, 1543, 1544, 1545, 1546, 1547
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*Elset, elset=_PickedSet186, internal, generate
 4321,  4344,     1
*Nset, nset=_PickedSet187, internal
   19,  216,  217,  218,  219,  220
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*Elset, elset=_PickedSet187, internal, generate
 4295,  4320,     1
*Nset, nset=_PickedSet188, internal
   13, 1556, 1557, 1558, 1559, 1560
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*Elset, elset=_PickedSet188, internal, generate
 4263,  4294,     1
*Nset, nset=_PickedSet189, internal
   56,  203,  204,  205,  206,  207
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*Elset, elset=_PickedSet189, internal, generate
 4233,  4262,     1
*Nset, nset=_PickedSet190, internal
  100, 1573, 1574, 1575, 1576, 1577
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*Elset, elset=_PickedSet190, internal, generate
 4204,  4232,     1
*Nset, nset=_PickedSet191, internal
   52,  186,  187,  188,  189,  190
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*Elset, elset=_PickedSet191, internal, generate
 4166,  4203,     1
*Nset, nset=_PickedSet192, internal
   99, 1586, 1587, 1588, 1589, 1590
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*Elset, elset=_PickedSet192, internal, generate
 4142,  4165,     1
*Nset, nset=_PickedSet193, internal
   33,  173,  174,  175,  176,  177
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*Elset, elset=_PickedSet193, internal, generate
 4114,  4141,     1
*Nset, nset=_PickedSet194, internal
  105, 1599, 1600, 1601, 1602, 1603
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*Elset, elset=_PickedSet194, internal, generate
 4083,  4113,     1
*Nset, nset=_PickedSet195, internal
   12,  160,  161,  162,  163,  164
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*Elset, elset=_PickedSet195, internal, generate
 4059,  4082,     1
*Nset, nset=_PickedSet196, internal
   53, 1614, 1615, 1616, 1617, 1618
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*Elset, elset=_PickedSet196, internal, generate
 4029,  4058,     1
*Nset, nset=_PickedSet197, internal
   32,  149,  150,  151,  152,  153
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*Elset, elset=_PickedSet197, internal, generate
 4009,  4028,     1
*Nset, nset=_PickedSet198, internal
    3, 1627, 1628, 1629, 1630, 1631
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*Elset, elset=_PickedSet198, internal, generate
 3978,  4008,     1
*Nset, nset=_PickedSet199, internal
   62,  136,  137,  138,  139,  140
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*Elset, elset=_PickedSet199, internal, generate
 3954,  3977,     1
*Nset, nset=_PickedSet200, internal
   29, 1642, 1643, 1644, 1645, 1646
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*Elset, elset=_PickedSet200, internal, generate
 3907,  3953,     1
*Nset, nset=_PickedSet201, internal
   46,  123,  124,  125,  126,  127
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*Elset, elset=_PickedSet201, internal, generate
 3881,  3906,     1
*Nset, nset=_PickedSet202, internal
   87, 1661, 1662, 1663, 1664, 1665
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*Elset, elset=_PickedSet202, internal, generate
 3849,  3880,     1
*Nset, nset=_PickedSet203, internal
   10,  106,  107,  108,  109,  110
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*Elset, elset=_PickedSet203, internal, generate
 3802,  3848,     1
*Nset, nset=_PickedSet204, internal
   15, 1678, 1679, 1680, 1681, 1682
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*Elset, elset=_PickedSet204, internal, generate
 3761,  3801,     1
** Section: Matrix
*Solid Section, elset=_PickedSet103, material=PEEK
,
** Section: Inclusion
*Solid Section, elset=_PickedSet204, material=CARBON
,
** Section: Inclusion
*Solid Section, elset=_PickedSet203, material=CARBON
,
** Section: Inclusion
*Solid Section, elset=_PickedSet202, material=CARBON
,
** Section: Inclusion
*Solid Section, elset=_PickedSet201, material=CARBON
,
** Section: Inclusion
*Solid Section, elset=_PickedSet200, material=CARBON
,
** Section: Inclusion
*Solid Section, elset=_PickedSet199, material=CARBON
,
** Section: Inclusion
*Solid Section, elset=_PickedSet198, material=CARBON
,
** Section: Inclusion
*Solid Section, elset=_PickedSet197, material=CARBON
,
** Section: Inclusion
*Solid Section, elset=_PickedSet196, material=CARBON
,
** Section: Inclusion
*Solid Section, elset=_PickedSet195, material=CARBON
,
** Section: Inclusion
*Solid Section, elset=_PickedSet194, material=CARBON
,
** Section: Inclusion
*Solid Section, elset=_PickedSet193, material=CARBON
,
** Section: Inclusion
*Solid Section, elset=_PickedSet192, material=CARBON
,
** Section: Inclusion
*Solid Section, elset=_PickedSet191, material=CARBON
,
** Section: Inclusion
*Solid Section, elset=_PickedSet190, material=CARBON
,
** Section: Inclusion
*Solid Section, elset=_PickedSet189, material=CARBON
,
** Section: Inclusion
*Solid Section, elset=_PickedSet188, material=CARBON
,
** Section: Inclusion
*Solid Section, elset=_PickedSet187, material=CARBON
,
** Section: Inclusion
*Solid Section, elset=_PickedSet186, material=CARBON
,
** Section: Inclusion
*Solid Section, elset=_PickedSet185, material=CARBON
,
** Section: Inclusion
*Solid Section, elset=_PickedSet184, material=CARBON
,
** Section: Inclusion
*Solid Section, elset=_PickedSet183, material=CARBON
,
** Section: Inclusion
*Solid Section, elset=_PickedSet182, material=CARBON
,
** Section: Inclusion
*Solid Section, elset=_PickedSet181, material=CARBON
,
** Section: Inclusion
*Solid Section, elset=_PickedSet180, material=CARBON
,
** Section: Inclusion
*Solid Section, elset=_PickedSet179, material=CARBON
,
** Section: Inclusion
*Solid Section, elset=_PickedSet178, material=CARBON
,
** Section: Inclusion
*Solid Section, elset=_PickedSet177, material=CARBON
,
** Section: Inclusion
*Solid Section, elset=_PickedSet176, material=CARBON
,
** Section: Inclusion
*Solid Section, elset=_PickedSet175, material=CARBON
,
** Section: Inclusion
*Solid Section, elset=_PickedSet174, material=CARBON
,
** Section: Inclusion
*Solid Section, elset=_PickedSet173, material=CARBON
,
** Section: Inclusion
*Solid Section, elset=_PickedSet172, material=CARBON
,
** Section: Inclusion
*Solid Section, elset=_PickedSet171, material=CARBON
,
** Section: Inclusion
*Solid Section, elset=_PickedSet170, material=CARBON
,
** Section: Inclusion
*Solid Section, elset=_PickedSet169, material=CARBON
,
** Section: Inclusion
*Solid Section, elset=_PickedSet168, material=CARBON
,
** Section: Inclusion
*Solid Section, elset=_PickedSet167, material=CARBON
,
** Section: Inclusion
*Solid Section, elset=_PickedSet166, material=CARBON
,
** Section: Inclusion
*Solid Section, elset=_PickedSet165, material=CARBON
,
** Section: Inclusion
*Solid Section, elset=_PickedSet164, material=CARBON
,
** Section: Inclusion
*Solid Section, elset=_PickedSet163, material=CARBON
,
** Section: Inclusion
*Solid Section, elset=_PickedSet162, material=CARBON
,
** Section: Inclusion
*Solid Section, elset=_PickedSet161, material=CARBON
,
** Section: Inclusion
*Solid Section, elset=_PickedSet160, material=CARBON
,
** Section: Inclusion
*Solid Section, elset=_PickedSet159, material=CARBON
,
** Section: Inclusion
*Solid Section, elset=_PickedSet158, material=CARBON
,
** Section: Inclusion
*Solid Section, elset=_PickedSet157, material=CARBON
,
** Section: Inclusion
*Solid Section, elset=_PickedSet156, material=CARBON
,
** Section: Inclusion
*Solid Section, elset=_PickedSet155, material=CARBON
,
** Section: Inclusion
*Solid Section, elset=_PickedSet154, material=CARBON
,
** Section: Inclusion
*Solid Section, elset=_PickedSet153, material=CARBON
,
** Section: Inclusion
*Solid Section, elset=_PickedSet152, material=CARBON
,
** Section: Inclusion
*Solid Section, elset=_PickedSet151, material=CARBON
,
** Section: Inclusion
*Solid Section, elset=_PickedSet150, material=CARBON
,
** Section: Inclusion
*Solid Section, elset=_PickedSet149, material=CARBON
,
** Section: Inclusion
*Solid Section, elset=_PickedSet148, material=CARBON
,
** Section: Inclusion
*Solid Section, elset=_PickedSet147, material=CARBON
,
** Section: Inclusion
*Solid Section, elset=_PickedSet146, material=CARBON
,
** Section: Inclusion
*Solid Section, elset=_PickedSet145, material=CARBON
,
** Section: Inclusion
*Solid Section, elset=_PickedSet144, material=CARBON
,
** Section: Inclusion
*Solid Section, elset=_PickedSet143, material=CARBON
,
** Section: Inclusion
*Solid Section, elset=_PickedSet142, material=CARBON
,
** Section: Inclusion
*Solid Section, elset=_PickedSet141, material=CARBON
,
** Section: Inclusion
*Solid Section, elset=_PickedSet140, material=CARBON
,
** Section: Inclusion
*Solid Section, elset=_PickedSet139, material=CARBON
,
** Section: Inclusion
*Solid Section, elset=_PickedSet138, material=CARBON
,
** Section: Inclusion
*Solid Section, elset=_PickedSet137, material=CARBON
,
** Section: Inclusion
*Solid Section, elset=_PickedSet136, material=CARBON
,
** Section: Inclusion
*Solid Section, elset=_PickedSet135, material=CARBON
,
** Section: Inclusion
*Solid Section, elset=_PickedSet134, material=CARBON
,
** Section: Inclusion
*Solid Section, elset=_PickedSet133, material=CARBON
,
** Section: Inclusion
*Solid Section, elset=_PickedSet132, material=CARBON
,
** Section: Inclusion
*Solid Section, elset=_PickedSet131, material=CARBON
,
** Section: Inclusion
*Solid Section, elset=_PickedSet130, material=CARBON
,
** Section: Inclusion
*Solid Section, elset=_PickedSet129, material=CARBON
,
** Section: Inclusion
*Solid Section, elset=_PickedSet128, material=CARBON
,
** Section: Inclusion
*Solid Section, elset=_PickedSet127, material=CARBON
,
** Section: Inclusion
*Solid Section, elset=_PickedSet126, material=CARBON
,
** Section: Inclusion
*Solid Section, elset=_PickedSet125, material=CARBON
,
** Section: Inclusion
*Solid Section, elset=_PickedSet124, material=CARBON
,
** Section: Inclusion
*Solid Section, elset=_PickedSet123, material=CARBON
,
** Section: Inclusion
*Solid Section, elset=_PickedSet122, material=CARBON
,
** Section: Inclusion
*Solid Section, elset=_PickedSet121, material=CARBON
,
** Section: Inclusion
*Solid Section, elset=_PickedSet120, material=CARBON
,
** Section: Inclusion
*Solid Section, elset=_PickedSet119, material=CARBON
,
** Section: Inclusion
*Solid Section, elset=_PickedSet118, material=CARBON
,
** Section: Inclusion
*Solid Section, elset=_PickedSet117, material=CARBON
,
** Section: Inclusion
*Solid Section, elset=_PickedSet116, material=CARBON
,
** Section: Inclusion
*Solid Section, elset=_PickedSet115, material=CARBON
,
** Section: Inclusion
*Solid Section, elset=_PickedSet114, material=CARBON
,
** Section: Inclusion
*Solid Section, elset=_PickedSet113, material=CARBON
,
** Section: Inclusion
*Solid Section, elset=_PickedSet112, material=CARBON
,
** Section: Inclusion
*Solid Section, elset=_PickedSet111, material=CARBON
,
** Section: Inclusion
*Solid Section, elset=_PickedSet110, material=CARBON
,
** Section: Inclusion
*Solid Section, elset=_PickedSet109, material=CARBON
,
** Section: Inclusion
*Solid Section, elset=_PickedSet108, material=CARBON
,
** Section: Inclusion
*Solid Section, elset=_PickedSet107, material=CARBON
,
** Section: Inclusion
*Solid Section, elset=_PickedSet106, material=CARBON
,
** Section: Inclusion
*Solid Section, elset=_PickedSet105, material=CARBON
,
** Section: Inclusion
*Solid Section, elset=_PickedSet104, material=CARBON
,
*End Instance
**
*Nset, nset=BottomEdge, instance=Part-1-1
  27,  81, 875, 876, 877, 878
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*Elset, elset=BottomEdge, instance=Part-1-1
 1073, 1081, 1087, 1088, 1304, 1306
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*Nset, nset=TopEdge, instance=Part-1-1
  81, 104, 847, 848, 849, 850
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*Elset, elset=TopEdge, instance=Part-1-1
 3084, 3085, 3208, 3211, 3253, 3254
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*End Assembly
**
** MATERIALS
**
*Material, name=CARBON
*Elastic
240000, 0.3
*Material, name=PEEK
*Elastic
3720, 0.4
** ----------------------------------------------------------------
**
** STEP: Step-1
**
*Step, name=Step-1, nlgeom=NO, inc=10000
*Static
0.01, 1., 1e-12, 0.1
**
** OUTPUT REQUESTS
**
*Restart, write, frequency=0
**
** FIELD OUTPUT: F-Output-1
**
*Output, field, variable=PRESELECT
**
** HISTORY OUTPUT: H-Output-2
**
*Output, history
*Node Output, nset=BottomEdge
RF2,
**
** HISTORY OUTPUT: H-Output-1
**
*Output, history, variable=PRESELECT
*End Step
